OpenVSP model (file version 5), 18 components.
Geometry view with OpenVSP parameter names; values to 6 digits, angles in degrees, lengths in the model's unit.
Overall bounding box: X_Min=0 X_Len=41.0168 Y_Min=-19.9494 Y_Len=39.8989 Z_Min=-3.29544 Z_Len=12.344

Fuselage "fuselage"
  location (X Y Z) 0 0 0, rotation 0 0 0
  bounding box size 38.02 4.01971 3.9624
  Design: Length=38.02
  cross sections:
    n  XLocPercent  YLocPercent  ZLocPercent  shape
    0  0            0            -0.0135      point
    1  0.032        0            -0.0135      ellipse Ellipse_Height=1.95072 Ellipse_Width=1.64592
    2  0.197838     0            0            general fuselage BotStr=1 BotTanAngle=90 CornerRad=0 Height=3.9624 LowStr=0.83 MaxWidthLoc=0.05 TopStr=0.83 TopTanAngle=90 UpStr=0.83 Width=3.76
    3  0.289402     0            0            as above
    4  0.5          0            0            as above
    5  0.646913     0            0            as above
    6  0.793826     0            0.006387     general fuselage BotStr=1 BotTanAngle=90 CornerRad=0 Height=3.3237 LowStr=0.83 MaxWidthLoc=0.05 TopStr=0.83 TopTanAngle=90 UpStr=0.83 Width=3.76
    7  1            0            0.03         circle Circle_Diameter=0.4
    8  1            0            0.03         point

Wing "Wing1", child of "fuselage"
  location (X Y Z) 13.7 0.75 1.9, rotation 3.478 0 0
  symmetric about XZ
  bounding box size 11.2139 39.8989 2.53225
  totals: TotalSpan=38.4 TotalProjectedSpan=38.3766 TotalChord=4.8382 TotalArea=185.787 TotalAR=7.92717 MAC=5.52695
  root: chord 8, twist 0, NACA 4-series Camber=0.024 CamberLoc=0.4 ThickChord=0.12
  sections:
    n  Span  Root_Chord  Tip_Chord  Area     Sweep  Sweep_Location  Dihedral  Twist  Twist_Location  tip airfoil
    1  9.6   8           4.8382     61.6234  9.5    1               -2        0      0.25            NACA 4-series Camber=0.024 CamberLoc=0.4 ThickChord=0.08
    2  9.6   4.8382      1.6764     31.2701  9.5    1               -2        0      0.25            as above
  structure "Wing_Struct0": Skin, RibArray0

Fuselage "Wing_Fairing", child of "fuselage"
  location (X Y Z) 11.2386 0 0.62089, rotation 180 0 0
  bounding box size 14.3114 3.165 4
  Design: Length=14.3114
  cross sections:
    n  XLocPercent  YLocPercent  ZLocPercent  shape
    0  0            0            0            point
    1  0.254749     0            0            general fuselage BotStr=1.83 BotTanAngle=90 CornerRad=0 Height=4 LowStr=1.4 MaxWidthLoc=0 TopStr=0.83 TopTanAngle=90 UpStr=0.83 Width=3
    2  0.603484     0            0            as above
    3  1            0            0            point

Wing "Strut1", child of "fuselage"
  location (X Y Z) 21.6189 1.47541 -1.72131, rotation 0 0 0
  symmetric about XZ
  bounding box size 1.49829 23.6703 3.98271
  totals: TotalSpan=22.1024 TotalProjectedSpan=20.7195 TotalChord=1.25 TotalArea=27.628 TotalAR=15.5385 MAC=1.26666
  root: chord 1.5, twist -3, NACA 4-series Camber=0.02 CamberLoc=0.4 ThickChord=0.12
  sections:
    n  Span     Root_Chord  Tip_Chord  Area    Sweep  Sweep_Location  Dihedral  Twist  Twist_Location  tip airfoil
    1  11.0512  1.5         1          13.814  0      0               20.375    -2.5   0.25            NACA 4-series Camber=0.02 CamberLoc=0.4 ThickChord=0.08
  structure "Strut_Struct0": Skin

Fuselage "MLG_Fairing", child of "fuselage"
  location (X Y Z) 15.9927 0 -0.198783, rotation 0 0 0
  bounding box size 14.24 3.79446 3.81
  Design: Length=14.24
  cross sections:
    n  XLocPercent  YLocPercent  ZLocPercent  shape
    0  0            0            0            point
    1  0.25         0            0            general fuselage BotStr=1.83 BotTanAngle=90 CornerRad=0 Height=3.81 LowStr=1.4 MaxWidthLoc=0 TopStr=0.83 TopTanAngle=90 UpStr=0.83 Width=3.59664
    2  0.5          0            0            as above
    3  1            0            0            point

Gear "NLG", child of "fuselage"
  location (X Y Z) 3.8 0 -3.2, rotation 0 0 0
  bounding box size 0.916667 0.428968 0.916667
  bogie "BOGIE_0": NumAcross=1 NumTandem=1 Spacing=0.458333 Pitch=1.00833 Symmetrical=1 XContactPt=0 YContactPt=0 TravelCompressed=1 TravelExtended=1 SteeringAngle=0 DiameterModel=0.916667 WidthModel=0.416667 PlyRating=20

Gear "MLG", child of "NLG"
  location (X Y Z) 22 1.75 -3.2, rotation 0 0 0
  symmetric about XZ
  bounding box size 1 4.38827 1
  bogie "BOGIE_0": NumAcross=2 NumTandem=1 Spacing=0.458333 Pitch=1.1 Symmetrical=0 XContactPt=0 YContactPt=0 TravelCompressed=1 TravelExtended=1 SteeringAngle=0 DiameterModel=1 WidthModel=0.416667 PlyRating=20

Wing "horizontal stabilizer"
  location (X Y Z) 34.2 0 5, rotation 5.65217 0 0
  symmetric about XZ
  bounding box size 6.8168 14.358 1.4333
  totals: TotalSpan=14.3566 TotalProjectedSpan=14.3369 TotalChord=2.65 TotalArea=38.045 TotalAR=5.40275 MAC=2.76352
  root: chord 3.6, twist 0, NACA 4-series Camber=0 CamberLoc=0.2 ThickChord=0.15
  sections:
    n  Span     Root_Chord  Tip_Chord  Area     Sweep    Sweep_Location  Dihedral  Twist  Twist_Location  tip airfoil
    1  7.17831  3.6         1.7        19.0225  35.4818  0               -3        0      0.25            NACA 4-series Camber=0 CamberLoc=0.2 ThickChord=0.1

Wing "vertical stabilizer", child of "horizontal stabilizer"
  location (X Y Z) 28.4896 0 1.5, rotation 90 0 0
  bounding box size 10.1434 0.877647 7.54859
  totals: TotalSpan=7.54859 TotalProjectedSpan=7.54859 TotalChord=4.83736 TotalArea=29.1213 TotalAR=1.95669 MAC=4.65627
  root: chord 8.77138, twist 0, NACA 4-series Camber=0 CamberLoc=0.2 ThickChord=0.1
  sections:
    n  Span     Root_Chord  Tip_Chord  Area     Sweep    Sweep_Location  Dihedral  Twist  Twist_Location  tip airfoil
    1  1.7      8.77138     4.46793    11.2534  69.274   0               0         0      0.25            as above
    2  5.84859  4.46793     1.64221    17.8678  34.4257  0               0         0      0.25            as above

Wing "Wing"
  location (X Y Z) 14.5 0 1.96721, rotation 0 0 0
  symmetric about XZ
  bounding box size 10.0596 33.6905 0.854357
  totals: TotalSpan=33.6905 TotalProjectedSpan=33.6905 TotalChord=3.5756 TotalArea=139.17 TotalAR=8.15583 MAC=4.88577
  root: chord 7.20238, twist 0, NACA 5-digit CamberLoc=0.154093 IdealCl=0.232143 ThickChord=0.117857
  sections:
    n  Span     Root_Chord  Tip_Chord  Area     Sweep  Sweep_Location  Dihedral  Twist  Twist_Location  tip airfoil
    1  11.4881  7.20238     3          58.603   28     0               0         0      0.25            as above
    2  5.35714  3           1.1        10.9821  28     0               0         0      0.25            NACA 4-series Camber=0 CamberLoc=0.2 ThickChord=0.1
  structure "WingGeom_Struct0": Skin, RibArray0
  structure "Wing2_Struct2": Skin, RibArray0, RibArray1

Fuselage "engine", child of "Wing"
  location (X Y Z) 13.3494 4.5 0.48, rotation 0 0 0
  symmetric about XZ
  bounding box size 5.15661 12.3156 2.77997
  Design: Length=5.64447
  cross sections:
    n  XLocPercent  YLocPercent  ZLocPercent  shape
    0  1            0            0            point
    1  0.173913     0            0            ellipse Ellipse_Height=1.7 Ellipse_Width=1.9
    2  0.764652     0            -0.0206573   ellipse Ellipse_Height=1.6 Ellipse_Width=1.8
    3  0.764652     0            0            ellipse Ellipse_Height=0.9144 Ellipse_Width=0.9144
    4  1            0            0            point

Fuselage "fan", child of "engine"
  location (X Y Z) 14.6194 4.5 0.48, rotation 0 0 0; relative location 1.27 0 0, rotation 0 0 0
  symmetric about XZ
  bounding box size 0.3048 10.8288 1.8288
  Design: Length=0.3048
  cross sections:
    n  XLocPercent  YLocPercent  ZLocPercent  shape
    0  0            0            0            point
    1  0            0            0            circle Circle_Diameter=1.8288
    2  1            0            0            as above
    3  1            0            0            point

Pod "PodGeom", child of "fan"
  location (X Y Z) 14.3219 4.5 0.48, rotation 0 0 0; relative location -0.297543 0 0, rotation 0 0 0
  symmetric about XZ
  bounding box size 1.88214 9.41825 0.418253
  Design: FineRatio=9 Length=1.88214

Fuselage "fixation", child of "engine"
  location (X Y Z) 15.6777 4.5 1.55902, rotation 0 0 0
  symmetric about XZ
  bounding box size 4.572 9.81687 0.81687
  Design: Length=4.572
  cross sections:
    n  XLocPercent  YLocPercent  ZLocPercent  shape
    0  0            0            0            point
    1  0.5          0            0            general fuselage BotStr=0.83 BotTanAngle=90 CornerRad=0 Height=0.4572 LowStr=0.83 MaxWidthLoc=0 TopStr=0.83 TopTanAngle=90 UpStr=0.83 Width=0.67056
    2  0.75         0            0.0108696    general fuselage BotStr=0.83 BotTanAngle=90 CornerRad=0 Height=0.277913 LowStr=0.83 MaxWidthLoc=0 TopStr=0.83 TopTanAngle=90 UpStr=0.83 Width=0.67056
    3  1            0            0            point

Wing "Strut", child of "Wing"
  location (X Y Z) 21.6189 1.47541 -1.72131, rotation 0 0 0
  symmetric about XZ
  bounding box size 1.49829 23.3119 3.74021
  totals: TotalSpan=21.6 TotalProjectedSpan=20.3611 TotalChord=1.25 TotalArea=27 TotalAR=15.3545 MAC=1.26666
  root: chord 1.5, twist -3, NACA 4-series Camber=0.02 CamberLoc=0.4 ThickChord=0.12
  sections:
    n  Span  Root_Chord  Tip_Chord  Area  Sweep  Sweep_Location  Dihedral  Twist  Twist_Location  tip airfoil
    1  10.8  1.5         1          13.5  0      0               19.5      -2.5   0.25            NACA 4-series Camber=0.02 CamberLoc=0.4 ThickChord=0.08
  structure "Strut2_Struct0": Skin

Wing "Wing_737"
  location (X Y Z) 13.7 0 -1.09728, rotation 3.478 0 0
  symmetric about XZ
  bounding box size 12.0435 35.8592 4.66166
  totals: TotalSpan=38.4008 TotalProjectedSpan=35.79 TotalChord=3.30925 TotalArea=132.008 TotalAR=9.70341 MAC=4.35793
  root: chord 7.7, twist 0, NACA 4-series Camber=0 CamberLoc=0.2 ThickChord=0.15
  sections:
    n  Span     Root_Chord  Tip_Chord  Area     Sweep    Sweep_Location  Dihedral  Twist  Twist_Location  tip airfoil
    1  5.481    7.7         4          32.0638  34.5227  0               0.434783  0      0.25            NACA 4-series Camber=0 CamberLoc=0.2 ThickChord=0.136364
    2  10.5928  4           1.6764     30.0644  26.5     0               2.17391   0      0.25            NACA 4-series Camber=0 CamberLoc=0.2 ThickChord=0.245455
    3  3.12661  1.6764      0.802681   3.87556  35       0               54.1984   0      0.25            NACA 4-series Camber=0 CamberLoc=0.2 Invert=1 ThickChord=0.1

Wing "Wing1Init"
  location (X Y Z) 13.7 0.75 1.9, rotation 3.478 0 0
  symmetric about XZ
  bounding box size 11.2501 39.8989 2.53225
  totals: TotalSpan=38.4 TotalProjectedSpan=38.3766 TotalChord=4.8382 TotalArea=185.787 TotalAR=7.92717 MAC=5.52695
  root: chord 8, twist 0, NACA 4-series Camber=0.024 CamberLoc=0.4 ThickChord=0.12
  sections:
    n  Span  Root_Chord  Tip_Chord  Area     Sweep  Sweep_Location  Dihedral  Twist  Twist_Location  tip airfoil
    1  19.2  8           1.6764     92.8934  26.5   0               -2        0      0.25            NACA 4-series Camber=0.024 CamberLoc=0.4 ThickChord=0.08
  structure "Wing_Struct0": Skin, RibArray0

Wing "WingInit"
  location (X Y Z) 14.5 0 1.96721, rotation 0 0 0
  symmetric about XZ
  bounding box size 10.0596 33.6905 0.854357
  totals: TotalSpan=33.6905 TotalProjectedSpan=33.6905 TotalChord=3.5756 TotalArea=139.17 TotalAR=8.15583 MAC=4.88577
  root: chord 7.20238, twist 0, NACA 5-digit CamberLoc=0.154093 IdealCl=0.232143 ThickChord=0.117857
  sections:
    n  Span     Root_Chord  Tip_Chord  Area     Sweep  Sweep_Location  Dihedral  Twist  Twist_Location  tip airfoil
    1  11.4881  7.20238     3          58.603   28     0               0         0      0.25            as above
    2  5.35714  3           1.1        10.9821  28     0               0         0      0.25            NACA 4-series Camber=0 CamberLoc=0.2 ThickChord=0.1
  structure "WingGeom_Struct0": Skin, RibArray0
  structure "Wing2_Struct2": Skin, RibArray0, RibArray1

VSPAERO settings: Sref=1447.16 bref=124.347 cref=10.75 Xcg=0 Ycg=0 Zcg=0 AlphaStart=5 AlphaEnd=10 AlphaNpts=3 BetaStart=0 BetaEnd=0 BetaNpts=1 MachStart=1 MachEnd=0 MachNpts=1 ReCref=1e+07 Vinf=100 Rho=0.002377
